# Homework X  Dmitri Lanevski
# Find the symmetry elements of a square and the representation matrices in the {x, y, z} basis. Consider rotations only!!
# There are:
# - 4 rotational axesof second order: C_ac, C_ad, C_bc, C_ab located in the plane of the square
# - axis of rotation through 90^o, 180^o and 270^o.
# - There is also identity element – rotation through 0^o and 360^o – E.
#
# Table 1. Table of multiplication for the symmetry elements of a square.
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# From following relations we obtain
# in case of rotations around z axis
x' == x*cos(φ) + y*sin(φ)
E := [1, 0, 0; 0, 1, 0; 0, 0, 1]
C_z(φ) := [cos(φ), sin(φ), 0; -sin(φ), cos(φ), 0; 0, 0, 1]
y' == -x*sin(φ) + y*cos(φ)
z' == z
C_4 == C_z(π/2) == [0, 1, 0; -1, 0, 0; 0, 0, 1]
C_4^2 == C_z(π) == [-1, 0, 0; 0, -1, 0; 0, 0, 1]
C_4^3 == C_z(3*π/2) == [0, -1, 0; 1, 0, 0; 0, 0, 1]
# in case of of rotations around y axis | in case of of rotations around x axis
x' == -x
x' == x
y' == y
C_ab := [-1, 0, 0; 0, 1, 0; 0, 0, -1]
y' == -y
C_ad := [1, 0, 0; 0, -1, 0; 0, 0, -1]
z' == -z
z' == -z
C_ac == C_4*C_ab == [0, 1, 0; 1, 0, 0; 0, 0, -1]
C_bc == C_4*C_ad == [0, -1, 0; -1, 0, 0; 0, 0, -1]
