# Homework XII  Dmitri Lanevski
# Home work: find the selection rules for the electric dipole transitions (in σ and π polarizations) for C_3v symmetry!
# σ polarization occurs if electric field is parallel to x and y. Electric dipole operator depends on x and y.
# π polarization occurs if electric field is parallel to z. Electric dipole operator depends on z.
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# Case: π polarization. Dipole operator is A1(z).
# A1 x A1 x A1
# A1 x A1 x A2
# A1 x A1 x  E
# A2 x A1 x A1
# A2 x A1 x A2
# A2 x A1 x  E
# E x A1 x A1
# E x A1 x A2
# E x A1 x  E
n := [1; 2; 3]
χ_irred := [1, 1, 1; 1, 1, -1; 2, -1, 0]
χ_red := [1, 1, 1; 1, 1, -1; 2, -1, 0; 1, 1, -1; 1, 1, 1; 2, -1, 0; 2, -1, 0; 2, -1, 0; 4, 1, 0]
# Irreducible representations can be found using previous datasets and equation 6.14 from page 131 in our coursebook:
n_tot := sum(n) = 6
s := 0, 1 .. 8
t := 0, 1 .. 2  # The transition is allowed if Г1 х Гf х Г2 contains identity element or in our case contains A1.
n_irred[s, t] := 1/n_tot*sum(χ_red[s, k]*χ_irred[t, k]*n[k], k = 0 .. 2)
# A1,A2,E
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n_irred = [1, 0, 0; 0, 1, 0; 0, 0, 1; 0, 1, 0; 1, 0, 0; 0, 0, 1; 0, 0, 1; 0, 0, 1; 1, 1, 1]
# Case: σ polarization . Dipole operator is E(x,y).
# A1 x E x A1
# A1 x E x A2
# A1 x E x  E
# A2 x E x A1
# A2 x E x A2
# A2 x E x  E
# E x E x A1
# E x E x A2
# E x E x  E
n := [1; 2; 3]
χ_irred := [1, 1, 1; 1, 1, -1; 2, -1, 0]
χ_red := [2, -1, 0; 2, -1, 0; 4, 1, 0; 2, -1, 0; 2, -1, 0; 4, 1, 0; 4, 1, 0; 4, 1, 0; 8, -1, 0]
# Irreducible representations can be found using previous datasets and equation 6.14 from page 131 in our coursebook:
n_tot := sum(n) = 6
s := 0, 1 .. 8
t := 0, 1 .. 2  # The transition is allowed if Г1 х Гf х Г2 contains identity element or in our case contains A1.
n_irred[s, t] := 1/n_tot*sum(χ_red[s, k]*χ_irred[t, k]*n[k], k = 0 .. 2)
# A1,A2,E
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n_irred = [0, 0, 1; 0, 0, 1; 1, 1, 1; 0, 0, 1; 0, 0, 1; 1, 1, 1; 1, 1, 1; 1, 1, 1; 1, 1, 3]
